# 1.Расчет двигателя
m := 20  # кг  # масса робота
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g := 9.8
V := 0.8  # м/c  скорость движения
D := 97  # мм  # диаметр колеса
fk := 0.02  # коэффициентр качения трения резина по бетону
η_пер := 0.97  # КПД цилиндрический зубчатая передача
R := D/(2*1000)
R = 0.0485
Fk := fk*m*g/R  # сила трения качения
Tko := Fk*R/2
# необходимый момент для одного колеса
Tko = 1.96
n_к := V*60/(2*π*R)
# частота вращения колеса
n_к = 157.514  # об/мин
k := 1.5  # коэффициент безопастности
P := Tko*n_к*2*3.14*k/60
P = 48.4703
T := Tko*10
T = 19.6
Pдв := 2.7*370*2*3.14/60
Pдв = 104.562
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